*Heading
** Job name: elastic_plate Model name: elastic_plate
** Generated by: Abaqus/CAE 2023.HF4
*Preprint, echo=NO, model=NO, history=NO, contact=NO
**
** PARTS
**
*Part, name=elastic_plate
*Node
      1, 0.0529999994, 0.0181120001, 0.00200000009
      2, 0.0529999994, 0.0181120001, 0.00100000005
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*Element, type=C3D8T
  1,   67,   68,   71,   70,    1,    2,    5,    4
  2,   68,   69,   72,   71,    2,    3,    6,    5
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*Nset, nset=Set-1, generate
    1,  4836,     1
*Elset, elset=Set-1, generate
    1,  3026,     1
** Section: Section-1
*Solid Section, elset=Set-1, material=multiphysics
,
*End Part
**
**
** ASSEMBLY
**
*Assembly, name=Assembly
**
*Instance, name=elastic_plate_1, part=elastic_plate
*End Instance
**
*Elset, elset=ALLE, instance=elastic_plate_1, generate
    1,  3026,     1
*Nset, nset=ALLN, instance=elastic_plate_1, generate
    1,  4836,     1
*Nset, nset=top_side, instance=elastic_plate_1
   64,   65,   66,  130,  131,  132
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*Elset, elset=top_side, instance=elastic_plate_1
   41,   42,   83,   84,  125,  126
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*Nset, nset=whole_part, instance=elastic_plate_1, generate
    1,  4836,     1
*Elset, elset=whole_part, instance=elastic_plate_1, generate
    1,  3026,     1
*Nset, nset=xsymm_side, instance=elastic_plate_1
 1283, 1284, 1285, 1286, 1287, 1288
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*Elset, elset=xsymm_side, instance=elastic_plate_1
  883,  884,  885,  886,  887,  888
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*Nset, nset=ysymm_side, instance=elastic_plate_1
 1783, 1787, 1793, 1805, 1820, 1831
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*Elset, elset=ysymm_side, instance=elastic_plate_1
 1229, 1230, 1231, 1232, 1233, 1234
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*Nset, nset=zsymm_side, instance=elastic_plate_1
    1,    3,    4,    6,    7,    9
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*Elset, elset=zsymm_side, instance=elastic_plate_1, generate
    1,  3026,     1
**
** INTEGRATED OUTPUT SECTIONS
**
*Integrated Output Section, name=surface, surface=Surf-1, project orientation=NO
*End Assembly
*Amplitude, name=ramp
             0.,              0.,     1000000000.,              1.
**
** MATERIALS
**
*Material, name=multiphysics
*Density
1.,
*Depvar
      0,
*User Material, constants=1, type=THERMAL
0.,
*User Material, constants=1, type=MECHANICAL
0.,
**
** PREDEFINED FIELDS
**
** Name: CL_mol_diffusion   Type: Temperature
*Initial Conditions, type=TEMPERATURE
whole_part, 20.
** Name: Predefined Field-3   Type: Pore pressure
*Initial Conditions, TYPE=PORE PRESSURE
ALLN, 100.
** ----------------------------------------------------------------
**
** STEP: Step-1
**
*Step, name=Step-1, nlgeom=YES, inc=10000000
*Coupled Temperature-displacement, creep=none, deltmx=10.
1e+07, 1e+09, 1e+06, 1e+07
**
** BOUNDARY CONDITIONS
**
** Name: mech_top_disp Type: Displacement/Rotation
*Boundary, amplitude=ramp
top_side, 2, 2, 0.004
** Name: mech_xsymm Type: Displacement/Rotation
*Boundary
xsymm_side, 1, 1
** Name: mech_ysymm Type: Displacement/Rotation
*Boundary
ysymm_side, 2, 2
** Name: mech_zsymm Type: Displacement/Rotation
*Boundary
zsymm_side, 3, 3
**
** PREDEFINED FIELDS
**
** Name: UFIELD   Type: Field
*Field, variable=1, user
whole_part
**
** OUTPUT REQUESTS
**
*Restart, write, frequency=0
**
** FIELD OUTPUT: F-Output-1
**
*Output, field
*Node Output
NT, RF, RFL, U
*Element Output, directions=YES
S, SDV
*Output, history, frequency=0
*End Step
