**************** UNITS: SI ****************
**
** Length: m
** Time: s
** Force: N
** Stress: Pa
** Mass: kg = (N*s^2)/m
** Density: kg/m^3
** Temperature: K
** Energy: J (or N*m)
** Amount of substance: mol
** Concentration: mol/m^3
**
************************************************
*Heading
** Job name: elastic_plate Model name: elastic_plate
** Generated by: Abaqus/CAE 2023.HF4
*Preprint, echo=NO, model=NO, history=NO, contact=NO
**
** PARTS
**
*Part, name=elastic_plate
**
*INCLUDE, INPUT="processing_input_elastic_plate/nodes.inc"
**
*************************************************
*User element, nodes=8, type=U1, properties=264, coordinates=3, variables=640
1, 2, 3
1, 11
1, 12
*************************************************
**
*INCLUDE, INPUT="processing_input_elastic_plate/elements_UEL.inc"
**
**
*INCLUDE, INPUT="processing_input_elastic_plate/elements_VISUAL.inc"
**
*******************************************************
*UEL PROPERTY, ELSET=SOLID
**
** =====================
**
** FIELD INFO PROPERTIES
**
** mech_field (1 - ON, 0 - OFF), hydro_field (1 - ON, 0 - OFF), temp_field (1 - ON, 0 - OFF), damage_field (1 - ON, 0 - OFF)
** none, none, none, none
1, 1, 1, 1, 0, 0, 0, 0
**
** =====================
**
** MECHANICAL PROPERTIES
**
** UMAT_model (1 - elastic, 2 - isotropic vM, 3 - enHill48), scaling_factor - SFD (dimless), Young's modulus - E (Pa), Poisson ratio - nu (dimless)
** none, none, none, none
1, 1.0e0, 210.0e+9, 0.3e0, 0.0, 0.0, 0.0, 0.0
**
** =====================
**
** FLOW CURVE PROPERTIES
**
** True stress (Pa) - PEEQ (dimless) value pairs
869678161.0449681, 0.00e+00, 871526750.9057986, 2.00e-04, 873375340.766629, 4.00e-04, 875223930.6274595, 6.00e-04
877072520.48829, 8.00e-04, 878921110.3491204, 1.00e-03, 888164059.6532726, 2.00e-03, 897407008.9574249, 3.00e-03
906649958.2615771, 4.00e-03, 915892907.5657294, 5.00e-03, 925135856.8698816, 6.00e-03, 934378806.1740339, 7.00e-03
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**
** ======================
**
** PHASE FIELD PROPERTIES
**
** Length scale - length_scale (m), Critical energy release rate without hydrogen - Gc0 (N*m/m^2), Well-conditioning parameter - xkap (dimless), Fitting slope to DFT data X - chi_DFT (dimless)
** Gibbs free energy difference between the decohering interface and the surrounding material - delta_g_b0 (N*m/mol), none, none, none
1.0e-3, 405.0e3, 1.0e-7, 0.89e0, 30000.0e0, 0.0, 0.0, 0.0
**
*******************************************************
*Nset, nset=Set-1, generate
1,  3216,     1
*Elset, elset=Set-1, generate
1,  1509,     1
** Section: Section-1
*Solid Section, elset=VISUAL, material=multiphysics
,
*End Part
**
**
** ASSEMBLY
**
*Assembly, name=Assembly
**
*Instance, name=elastic_plate_1, part=elastic_plate
*End Instance
**
*Elset, elset=ALLE, instance=elastic_plate_1, generate
1,  1509,     1
*Nset, nset=ALLN, instance=elastic_plate_1, generate
1,  3216,     1
*Nset, nset=top_side, instance=elastic_plate_1
2083, 2084, 2085, 2086, 2087, 2088
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*Elset, elset=top_side, instance=elastic_plate_1
984, 1005, 1026, 1047, 1068, 1089
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*Nset, nset=whole_part, instance=elastic_plate_1, generate
1,  3216,     1
*Elset, elset=whole_part, instance=elastic_plate_1, generate
1,  1509,     1
*Nset, nset=xsymm_side, instance=elastic_plate_1
1,    3,   16,   17,   18,   19
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*Elset, elset=xsymm_side, instance=elastic_plate_1
1,    2,    6,    9,   17,   18
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*Nset, nset=ysymm_side, instance=elastic_plate_1
6,    7,   76,   77,   78,   79
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*Elset, elset=ysymm_side, instance=elastic_plate_1
41,  62,  63,  65,  66,  67
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*Nset, nset=zsymm_side, instance=elastic_plate_1, generate
1,  3216,     1
*Elset, elset=zsymm_side, instance=elastic_plate_1, generate
1,  1509,     1
*End Assembly
*Amplitude, name=ramp
0.,              0.,            1e+9.,              1.
**
** MATERIALS
**
*Material, name=multiphysics
*Density
1.,
*Depvar
  48,
1, #25_eqplas, #25_eqplas
2, #26_eqplas_grad_X, #26_eqplas_grad_X
3, #27_eqplas_grad_Y, #27_eqplas_grad_Y
4, #28_eqplas_grad_Z, #28_eqplas_grad_Z
5, #29_eqplas_rate, #29_eqplas_rate
6, #30_deqplas, #30_deqplas
7, #31_sig_H, #31_sig_H
8, #32_sig_H_grad_X, #32_sig_H_grad_X
9, #33_sig_H_grad_Y, #33_sig_H_grad_Y
10, #34_sig_H_grad_Z, #34_sig_H_grad_Z
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48, #80_Gc, #80_Gc
*User Material, constants=1, type=THERMAL
0.,
*User Material, constants=1, type=MECHANICAL
0.,
**
** PREDEFINED FIELDS
**
** Name: CL_mol_diffusion   Type: Temperature
*Initial Conditions, type=TEMPERATURE
ALLN, 20.
** ----------------------------------------------------------------
**
** STEP: Step-1
**
*Step, name=Step-1, nlgeom=YES, inc=10000000
*Coupled Temperature-displacement, creep=none, deltmx=100000.
1e+7, 1e+9., 0.0001, 1e+7
*SOLVER CONTROLS
 ,  ,  ,
*CONTROLS, PARAMETERS=FIELD, FIELD=DISPLACEMENT
 ,  ,  ,  ,  ,  ,  ,  ,
 ,  ,  ,
*CONTROLS, PARAMETERS=FIELD, FIELD=TEMPERATURE
 ,  ,  ,  ,  ,  ,  ,  ,
 ,  ,  ,
*CONTROLS, PARAMETERS=CONSTRAINTS
 ,  ,  ,  ,  ,  ,  ,  ,
*CONTROLS, PARAMETERS=TIME INCREMENTATION
 ,  ,  ,  ,  ,  ,  ,  ,  ,  ,  ,  ,  ,
 ,  ,  ,  ,  ,  ,  ,  ,
 ,  ,  ,  ,  ,  ,  ,  ,
 ,
*CONTROLS, PARAMETERS=LINE SEARCH
 ,  ,  ,  ,  ,
**
** BOUNDARY CONDITIONS
**
** Name: mech_top_disp Type: Displacement/Rotation
*Boundary, amplitude=ramp
top_side, 2, 2, 0.0001
** Name: mech_xsymm Type: Displacement/Rotation
*Boundary
xsymm_side, 1, 1
** Name: mech_ysymm Type: Displacement/Rotation
*Boundary
ysymm_side, 2, 2
** Name: mech_zsymm Type: Displacement/Rotation
*Boundary
zsymm_side, 3, 3
*Boundary
top_side, 12, 12, 100
**
** PREDEFINED FIELDS
**
** Name: UFIELD   Type: Field
*Field, variable=1, user
ALLN
**
** OUTPUT REQUESTS
**
*Restart, write, frequency=0
**
** FIELD OUTPUT: F-Output-1
**
*Output, field
*Node Output
RF,U,NT,RFL
*Element Output, directions=YES
SDV
*Output, history, frequency=0
*End Step
