*Heading
** Job name: elastic_plate_default_solver Model name: elastic_plate_default_solver
** Generated by: Abaqus/CAE 2023.HF4
*Preprint, echo=NO, model=NO, history=NO, contact=NO
**
** PARTS
**
*Part, name=elastic_plate
*Node
      1,           0., 0.0181120001, 0.000500000024
      2, 0.0185979996, 0.0181120001, 0.000500000024
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*Element, type=C3D8T
  1,  164,   26,   27,  142, 1035,  897,  898, 1013
  2,   26,  164,  141,   25,  897, 1035, 1012,  896
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*Nset, nset=Set-1, generate
    1,  3216,     1
*Elset, elset=Set-1, generate
    1,  1509,     1
** Section: Section-1
*Solid Section, elset=Set-1, material=multiphysics
,
*End Part
**
**
** ASSEMBLY
**
*Assembly, name=Assembly
**
*Instance, name=elastic_plate_1, part=elastic_plate
*End Instance
**
*Elset, elset=ALLE, instance=elastic_plate_1, generate
    1,  1509,     1
*Nset, nset=ALLN, instance=elastic_plate_1, generate
    1,  3216,     1
*Nset, nset=top_side, instance=elastic_plate_1
 2083, 2084, 2085, 2086, 2087, 2088
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*Elset, elset=top_side, instance=elastic_plate_1
  984, 1005, 1026, 1047, 1068, 1089
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*Nset, nset=whole_part, instance=elastic_plate_1, generate
    1,  3216,     1
*Elset, elset=whole_part, instance=elastic_plate_1, generate
    1,  1509,     1
*Nset, nset=xsymm_side, instance=elastic_plate_1
    1,    3,   16,   17,   18,   19
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*Elset, elset=xsymm_side, instance=elastic_plate_1
    1,    2,    6,    9,   17,   18
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*Nset, nset=ysymm_side, instance=elastic_plate_1
    6,    7,   76,   77,   78,   79
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*Elset, elset=ysymm_side, instance=elastic_plate_1
  41,  62,  63,  65,  66,  67
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*Nset, nset=zsymm_side, instance=elastic_plate_1, generate
    1,  3216,     1
*Elset, elset=zsymm_side, instance=elastic_plate_1, generate
    1,  1509,     1
*End Assembly
*Amplitude, name=ramp
             0.,              0.,     1000000000.,              1.
**
** MATERIALS
**
*Material, name=multiphysics
*Conductivity
 2e-05,
*Density
7900.,
*Elastic
 2.1e+11, 0.3
*Specific Heat
400.,
** ----------------------------------------------------------------
**
** STEP: Step-1
**
*Step, name=Step-1, nlgeom=YES, inc=10000000
*Coupled Temperature-displacement, creep=none, deltmx=100000.
1e+07, 1e+09, 0.0001, 1e+07
**
** BOUNDARY CONDITIONS
**
** Name: heat_top Type: Temperature
*Boundary
top_side, 11, 11, 100.
** Name: mech_top_disp Type: Displacement/Rotation
*Boundary, amplitude=ramp
top_side, 2, 2, 0.0001
** Name: mech_xsymm Type: Displacement/Rotation
*Boundary
xsymm_side, 1, 1
** Name: mech_ysymm Type: Displacement/Rotation
*Boundary
ysymm_side, 2, 2
** Name: mech_zsymm Type: Displacement/Rotation
*Boundary
zsymm_side, 3, 3
**
** OUTPUT REQUESTS
**
*Restart, write, frequency=0
**
** FIELD OUTPUT: F-Output-1
**
*Output, field
*Node Output
NT, RF, RFL, U
*Element Output, directions=YES
HFL, S, SDV, TEMP
*Output, history, frequency=0
*End Step
