**************** UNITS: SI ****************
**
** Length: m
** Time: s
** Force: N
** Stress: Pa
** Mass: kg = (N*s^2)/m
** Density: kg/m^3
** Temperature: K
** Energy: J (or N*m)
** Amount of substance: mol
** Concentration: mol/m^3
**
************************************************
*Heading
** Job name: notched_plate Model name: notched_plate
** Generated by: Abaqus/CAE 2023.HF4
*Preprint, echo=NO, model=NO, history=NO, contact=NO
**
** PARTS
**
*Part, name=plate
**
*INCLUDE, INPUT="processing_input_notched_plate/nodes.inc"
**
*************************************************
*User element, nodes=8, type=U1, properties=264, coordinates=3, variables=640
1, 2, 3
1, 11
1, 12
*************************************************
**
*INCLUDE, INPUT="processing_input_notched_plate/elements_UEL.inc"
**
**
*INCLUDE, INPUT="processing_input_notched_plate/elements_VISUAL.inc"
**
*******************************************************
*UEL PROPERTY, ELSET=SOLID
**
** =====================
**
** FIELD INFO PROPERTIES
**
** mech_field (1 - ON, 0 - OFF), hydro_field (1 - ON, 0 - OFF), temp_field (1 - ON, 0 - OFF), damage_field (1 - ON, 0 - OFF)
** none, none, none, none
1, 1, 1, 1, 0, 0, 0, 0
**
** =====================
**
** MECHANICAL PROPERTIES
**
** UMAT_model (1 - elastic, 2 - isotropic vM, 3 - enHill48), scaling_factor - SFD (dimless), Young's modulus - E (Pa), Poisson ratio - nu (dimless)
** none, none, none, none
1, 1.0e0, 210.0e+9, 0.3e0, 0.0, 0.0, 0.0, 0.0
**
** =====================
**
** FLOW CURVE PROPERTIES
**
** True stress (Pa) - PEEQ (dimless) value pairs
869678161.0449681, 0.00e+00, 871526750.9057986, 2.00e-04, 873375340.766629, 4.00e-04, 875223930.6274595, 6.00e-04
877072520.48829, 8.00e-04, 878921110.3491204, 1.00e-03, 888164059.6532726, 2.00e-03, 897407008.9574249, 3.00e-03
906649958.2615771, 4.00e-03, 915892907.5657294, 5.00e-03, 925135856.8698816, 6.00e-03, 934378806.1740339, 7.00e-03
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**
** ======================
**
** PHASE FIELD PROPERTIES
**
** Length scale - length_scale (m), Critical energy release rate without hydrogen - Gc0 (N*m/m^2), Well-conditioning parameter - xkap (dimless), Fitting slope to DFT data X - chi_DFT (dimless)
** Gibbs free energy difference between the decohering interface and the surrounding material - delta_g_b0 (N*m/mol), none, none, none
1.0e-3, 405.0e3, 1.0e-7, 0.89e0, 30000.0e0, 0.0, 0.0, 0.0
**
*******************************************************
*Nset, nset=whole_plate, generate
1,  10354,      1
*Elset, elset=whole_plate, generate
1,  5086,     1
** Section: Section-1
*Solid Section, elset=VISUAL, material=multiphysics
,
*End Part
**
**
** ASSEMBLY
**
*Assembly, name=Assembly
**
*Instance, name=plate-1, part=plate
*End Instance
**
*Elset, elset=ALLE, instance=plate-1, generate
1,  5086,     1
*Nset, nset=ALLN, instance=plate-1, generate
1,  10354,      1
*Nset, nset=bottom_side, instance=plate-1
11,   12,   14,   16,  408,  409
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*Elset, elset=bottom_side, instance=plate-1
459,  460,  462,  463,  468,  504
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*Nset, nset=left_side, instance=plate-1
7,   8,   9,  10,  12,  13
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*Elset, elset=left_side, instance=plate-1
29,  47,  52,  54,  72,  74
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*Nset, nset=middle_line, instance=plate-1
2,   3,   4,   6,  45,  46
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*Elset, elset=middle_line, instance=plate-1
875,  876,  878,  879,  880,  927
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*Nset, nset=right_side, instance=plate-1
3,    6, 2123, 2124, 2138, 2139
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*Elset, elset=right_side, instance=plate-1
910,  917,  924,  925,  926,  970
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*Nset, nset=top_side, instance=plate-1
1,    5,    8,    9,  315,  316
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*Elset, elset=top_side, instance=plate-1
8,   47,   48,   58,   65,   66
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*Nset, nset=whole_plate, instance=plate-1, generate
1,  10354,      1
*Elset, elset=whole_plate, instance=plate-1, generate
1,  5086,     1
*End Assembly
*Amplitude, name=constant
0.,              1.,           1000.,              1.
*Amplitude, name=constant_temp_init
0.,              1.,              1.,              1.
*Amplitude, name=ramp
0.,              0.,           1000.,              1.
*Amplitude, name=ramp_temp_middle
1.,              1.,           1000.,              3.
**
** MATERIALS
**
*Material, name=multiphysics
*Density
1.,
*Depvar
  48,
1, #25_eqplas, #25_eqplas
2, #26_eqplas_grad_X, #26_eqplas_grad_X
3, #27_eqplas_grad_Y, #27_eqplas_grad_Y
4, #28_eqplas_grad_Z, #28_eqplas_grad_Z
5, #29_eqplas_rate, #29_eqplas_rate
6, #30_deqplas, #30_deqplas
7, #31_sig_H, #31_sig_H
8, #32_sig_H_grad_X, #32_sig_H_grad_X
9, #33_sig_H_grad_Y, #33_sig_H_grad_Y
10, #34_sig_H_grad_Z, #34_sig_H_grad_Z
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48, #80_Gc, #80_Gc
*User Material, constants=1, type=THERMAL
0.,
*User Material, constants=1, type=MECHANICAL
0.,
** ----------------------------------------------------------------
**
** STEP: Step-1
**
*Step, name=Step-1, nlgeom=YES, inc=1000000000
*Coupled Temperature-displacement, creep=none, deltmx=1000.
1., 1000., 0.01, 1.
*SOLVER CONTROLS
 ,  ,  ,
*CONTROLS, PARAMETERS=FIELD, FIELD=DISPLACEMENT
 ,  ,  ,  ,  ,  ,  ,  ,
 ,  ,  ,
*CONTROLS, PARAMETERS=FIELD, FIELD=TEMPERATURE
 ,  ,  ,  ,  ,  ,  ,  ,
 ,  ,  ,
*CONTROLS, PARAMETERS=CONSTRAINTS
 ,  ,  ,  ,  ,  ,  ,  ,
*CONTROLS, PARAMETERS=TIME INCREMENTATION
 ,  ,  ,  ,  ,  ,  , 100,  ,  ,  ,  ,  ,
 ,  ,  ,  ,  ,  ,  ,  ,
 ,  ,  ,  ,  ,  ,  ,  ,
 ,
*CONTROLS, PARAMETERS=LINE SEARCH
 ,  ,  ,  ,  ,
**
** BOUNDARY CONDITIONS
**
** Name: mech_bottom_fix Type: Symmetry/Antisymmetry/Encastre
*Boundary
bottom_side, PINNED
** Name: mech_top_disp Type: Displacement/Rotation
*Boundary, amplitude=ramp
top_side, 2, 2, 5e-05
**
** PREDEFINED FIELDS
**
** Name: UFIELD   Type: Field
*Field, variable=1, user
ALLN
**
** OUTPUT REQUESTS
**
*Restart, write, frequency=0
**
** FIELD OUTPUT: F-Output-1
**
*Output, field
*Node Output
RF,U,NT,RFL
*Element Output, directions=YES
SDV
*Output, history, frequency=0
*End Step
