*Heading
** Job name: notched_plate_default_solver Model name: notched_plate_default_solver
** Generated by: Abaqus/CAE 2023.HF4
*Preprint, echo=NO, model=NO, history=NO, contact=NO
**
** PARTS
**
*Part, name=plate
*Node
      1, -1.02445483e-11, 0.000500000024, 4.99999987e-06
      2,           0.,           0., 4.99999987e-06
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*Element, type=C3D8T
  1,  551,  549,  170,  171,  946,  944,   20,   19
  2,  171,  172,  553,  551,   19,   18,  948,  946
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*Nset, nset=whole_plate, generate
     1,  10354,      1
*Elset, elset=whole_plate, generate
    1,  5086,     1
** Section: Section-1
*Solid Section, elset=whole_plate, material=multiphysics
,
*End Part
**
**
** ASSEMBLY
**
*Assembly, name=Assembly
**
*Instance, name=plate-1, part=plate
*End Instance
**
*Elset, elset=ALLE, instance=plate-1, generate
    1,  5086,     1
*Nset, nset=ALLN, instance=plate-1, generate
     1,  10354,      1
*Nset, nset=bottom_side, instance=plate-1
   11,   12,   14,   16,  408,  409
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*Elset, elset=bottom_side, instance=plate-1
  459,  460,  462,  463,  468,  504
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*Nset, nset=left_side, instance=plate-1
   7,   8,   9,  10,  12,  13
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*Elset, elset=left_side, instance=plate-1
  29,  47,  52,  54,  72,  74
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*Nset, nset=middle_line, instance=plate-1
   2,   3,   4,   6,  45,  46
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*Elset, elset=middle_line, instance=plate-1
  875,  876,  878,  879,  880,  927
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*Nset, nset=right_side, instance=plate-1
    3,    6, 2123, 2124, 2138, 2139
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*Elset, elset=right_side, instance=plate-1
  910,  917,  924,  925,  926,  970
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*Nset, nset=top_side, instance=plate-1
    1,    5,    8,    9,  315,  316
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*Elset, elset=top_side, instance=plate-1
    8,   47,   48,   58,   65,   66
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*Nset, nset=whole_plate, instance=plate-1, generate
     1,  10354,      1
*Elset, elset=whole_plate, instance=plate-1, generate
    1,  5086,     1
*End Assembly
*Amplitude, name=constant
             0.,              1.,           1000.,              1.
*Amplitude, name=constant_temp_init
             0.,              1.,              1.,              1.
*Amplitude, name=ramp
             0.,              0.,           1000.,              1.
*Amplitude, name=ramp_temp_middle
             1.,              1.,           1000.,              3.
**
** MATERIALS
**
*Material, name=multiphysics
*Conductivity
2.,
*Density
7900.,
*Elastic
 2.1e+11, 0.3
*Specific Heat
400.,
** ----------------------------------------------------------------
**
** STEP: Step-1
**
*Step, name=Step-1, nlgeom=YES, inc=1000000000
*Coupled Temperature-displacement, creep=none, deltmx=1000.
1., 1000., 0.01, 1.
**
** BOUNDARY CONDITIONS
**
** Name: mech_bottom_fix Type: Symmetry/Antisymmetry/Encastre
*Boundary
bottom_side, PINNED
** Name: mech_top_disp Type: Displacement/Rotation
*Boundary, amplitude=ramp
top_side, 2, 2, 5e-05
**
** OUTPUT REQUESTS
**
*Restart, write, frequency=0
**
** FIELD OUTPUT: F-Output-1
**
*Output, field
*Node Output
NT, RF, RFL, U
*Element Output, directions=YES
LE, S, SDV, UVARM
*Output, history, frequency=0
*End Step
