*Heading
** Job name: solver_cube_C3D8T_transient_nlgeom_on_4NP_heat_transfer Model name: solver_cube_C3D8T_transient_nlgeom_on_4NP_heat_transfer
** Generated by: Abaqus/CAE 2023.HF4
*Preprint, echo=NO, model=NO, history=NO, contact=NO
**
** PARTS
**
*Part, name=cube
*Node
      1, 0.00100000005, 0.00100000005, 0.00100000005
      2, 0.00100000005,           0., 0.00100000005
      3, 0.00100000005, 0.00100000005,           0.
      4, 0.00100000005,           0.,           0.
      5, 4.74974504e-11, 0.00100000005, 0.00100000005
      6, 4.74974504e-11,           0., 0.00100000005
      7, 4.74974504e-11, 0.00100000005,           0.
      8, 4.74974504e-11,           0.,           0.
*Element, type=DC3D8
1, 3, 4, 2, 1, 7, 8, 6, 5
*Nset, nset=Set-4, generate
 1,  8,  1
*Elset, elset=Set-4
 1,
** Section: Section-1
*Solid Section, elset=Set-4, material=thermomechanical
,
*End Part
**
**
** ASSEMBLY
**
*Assembly, name=Assembly
**
*Instance, name=cube_assembly, part=cube
     -0.0005,      -0.0005,      -0.0005
*End Instance
**
*Nset, nset=four_NP, instance=cube_assembly, generate
 1,  7,  2
*Nset, nset=top_side, instance=cube_assembly, generate
 1,  7,  2
*Elset, elset=top_side, instance=cube_assembly
 1,
*Elset, elset=whole_cube_element, instance=cube_assembly
 1,
*Nset, nset=xsymm_side, instance=cube_assembly, generate
 5,  8,  1
*Elset, elset=xsymm_side, instance=cube_assembly
 1,
*Nset, nset=ysymm_side, instance=cube_assembly, generate
 2,  8,  2
*Elset, elset=ysymm_side, instance=cube_assembly
 1,
*Nset, nset=zsymm_side, instance=cube_assembly
 3, 4, 7, 8
*Elset, elset=zsymm_side, instance=cube_assembly
 1,
*End Assembly
*Amplitude, name=loading
             0.,              0.,            100.,              1.
**
** MATERIALS
**
*Material, name=thermomechanical
*Conductivity
 0.01,
*Density
7900.,
*Elastic
 2.1e+11, 0.3
*Specific Heat
400.,
** ----------------------------------------------------------------
**
** STEP: Step-1
**
*Step, name=Step-1, nlgeom=NO
*Heat Transfer, end=PERIOD, deltmx=100.
1., 1., 0.001, 1.,
*MATRIX GENERATE, STIFFNESS
*MATRIX OUTPUT, STIFFNESS, FORMAT=MATRIX INPUT
*FILE FORMAT, ASCII
*ELEMENT MATRIX OUTPUT, ELSET=cube_assembly.Set-4, FILE NAME=Stiffness_element, FREQUENCY=1, OUTPUT FILE=USER DEFINED, STIFFNESS=YES
*ELEMENT MATRIX OUTPUT, ELSET=cube_assembly.Set-4, FILE NAME=Load_element, FREQUENCY=1, OUTPUT FILE=USER DEFINED, DLOAD=YES
**
** BOUNDARY CONDITIONS
**
** Name: BC-1 Type: Temperature
*Boundary
top_side, 11, 11, 100.
**
** OUTPUT REQUESTS
**
*Restart, write, frequency=0
**
** FIELD OUTPUT: F-Output-1
**
*Output, field, variable=PRESELECT
*Output, history, frequency=0
*End Step
